// COMSOL Multiphysics 5.4.0.246 model "modelG_beltrami.mph"
// Outline of the model tree
// Unit system: none

Parameters
  kB = 8.6173303e-5  // Boltzmann constant (eV/K)
  T = 293  // Absolute temperature (K)
  c0 = 1  // Bulk ion concentration (mol/m^3)
  F = 96485.3329  // Farady constant (As/mol)
  eps0 = 8.854187e-12  // Vacuum permittivity (F/m)
  e = 1.602e-19  // Unit charge (As)
  NA = F/e  // avogadros constant (1/mol)
  mu = 5e-8  // Ion mobility (m²/Vs)
  muS = mu/10  // Ion mobility in Stern layer (m²/Vs)
  L = 10*a  // Radius of domain (m)
  a = 5e-6  // Particle radius (m)
  w = 1  // Angular frequency (rad/s)
  E0 = 1  // External field strength (V/m)
  epsW = 80  // Relative permittivity of electrolyte (-)
  epsP = 4.5  // Relative permittivity of particle (-)
  lambda = sqrt(eps0*epsW*kB*T/(2*c0*F))  // Debye length (m)
  sig = 0.01  // Total surface charge density (C/m²)
  p = 1  // Fraction of charge in Stern layer (-)
  gNad = sig/e-gNaS  // Equivalent surface site density (1/m²)
  gNaS = sig/e*p  // Surface site density Stern layer (1/m²)
  tau = a*a/(2*mu*kB*T)  // Relaxation time (s)
  ka = 2*c0*mu*F

Variables
  var1 "Variablen"
    D = mu*kB*T  // Ion diffusivity (m²/s)
    DS = muS*kB*T  // Ion diffusivity in Stern layer (m²/s)
    kappa = 1/lambda  // Debye parameter (1/m)
    sigma0 = 2*c0*mu*F  // Bulk electr. conductivity (S/m)

Couplings
  genext2: GeneralExtrusion "Allgemeine Extrusion 2" on boundaries 8, 9
    dstmap = {a*sin(x), a*cos(x)}
    usesrcmap = on
    srcmap = {r, z}

Geometry
  geom1 "Geometrie 1" (2D axisymmetric, length unit m)
    r1: Rectangle "Rechteck 1" | pos = {0, -L}; size = {L, 2*L}
    c1: Circle "Kreis 1" | r = a
    dif1: Difference "Differenz 1" | input = r1; input2 = c1
    c2: Circle "Kreis 2" | rot = 270; r = a; angle = 180
    fin: Finalize "Vereinigung bilden"

Physics
  c: CoefficientFormPDE "Stationary u0" on domains 1, 2
    dependent variable u
    cfeq1: CoefficientFormPDE "PB equation" (default)
      c = {eps0*if(dom==1,epsW,epsP)*r, 0, 0, eps0*if(dom==1,epsW,epsP)*r}
      f = -2*if(dom==1,c0,0)*F*sinh(u/(kB*T))*r
      da = 0
    zflx1: ZeroFluxBoundary "Kein Fluss 1" (default)
    init1: init "Anfangswerte 1" (default)
    dir2: DirichletBoundary "Fixed-potential BC infty" on boundaries 2, 6, 7 | r = 0
    flux1: FluxBoundary "Fixed charge BC surface" on boundaries 8, 9 | g = -gNad*e*r
  c2: CoefficientFormPDE "FD n,p,u" on all domains
    dependent variable u2 = {u21, u22, u23}
    cfeq1: CoefficientFormPDE "PNP System" (default)
      c = 
        {D*r*if(dom==1,1,0), 0, 0, D*r*if(dom==1,1,0)}
        {0, 0, 0, 0}
        {0, 0, 0, 0}
        {0, 0, 0, 0}
        {D*r*if(dom==1,1,0), 0, 0, D*r*if(dom==1,1,0)}
        {0, 0, 0, 0}
        {-mu*c0*exp(u/(kB*T))*r*if(dom==1,1,0), 0, 0, -mu*c0*exp(u/(kB*T))*r*if(dom==1,1,0)}
        {mu*c0*exp(-u/(kB*T))*r*if(dom==1,1,0), 0, 0, mu*c0*exp(-u/(kB*T))*r*if(dom==1,1,0)}
        {eps0*if(dom==1,epsW,epsP)*r, 0, 0, eps0*if(dom==1,epsW,epsP)*r}
      a = {i*w*r, 0, F*r*if(dom==1,1,0), 0, i*w*r, -F*r*if(dom==1,1,0), 0, 0, 0}
      f = {0, 0, 0}
      da = 0
      al = 
        {-mu*ur*r*if(dom==1,1,0), -mu*uz*r*if(dom==1,1,0)}
        {0, 0}
        {0, 0}
        {0, 0}
        {mu*ur*r*if(dom==1,1,0), mu*uz*r*if(dom==1,1,0)}
        {0, 0}
        {0, 0}
        {0, 0}
        {0, 0}
    zflx1: ZeroFluxBoundary "No flux" (default)
    init1: init "Initial values" (default)
    dir1: DirichletBoundary "BC top" on boundaries 6 | r = {0, 0, -E0*L}
    dir2: DirichletBoundary "BC bottom" on boundaries 2 | r = {0, 0, E0*L}
    flux1: FluxBoundary "Oscillating charge BC surface" on boundaries 8, 9 | g = {0, 0, u3*e*r}; q = 0
  cb: CoefficientFormBoundaryPDE "FD SigmaS" on boundaries 8, 9
    dependent variable u3
    cfeq1: CoefficientFormPDE "PDGL, Koeffizientenform 1" (default)
      c = {DS*r, 0, 0, DS*r}
      a = i*w*r
      f = 0
      da = 0
      ga = {-muS*gNaS*u23r*r, -muS*gNaS*u23z*r}
    init1: init "Anfangswerte 1" (default)

Mesh
  mesh1 "Netz 1"
    size: MeshSizeDefault "Größe" | hmax = L/20; hmin = pi*a/400; hauto = 3
    size1: Size "Größe 1" on boundaries 8, 9 | hmax = pi*a/400; custom = on
    ftri1: FreeTri "Freies Dreiecksnetz 1" on remaining entities
    bl1: BndLayer "Randschichten 1" on entire geometry
      blp: BndLayerProp "Randschichteigenschaften" on boundaries 8, 9 | inittype = blhmin; blhmin = lambda/2

Studies
  std1 "1. Stationary PB"
    stat: Stationary "Stationär" | solve for = {c}
  std2 "2. FD PNP"
    param: Parametric "Parametrischer Sweep" | sweeptype = filled; pname = w; plistarr = 10^{range(-1,6/59,5)}
    stat: Stationary "Stationär"
      solve for = {c2, cb}
      usesol = on
      notsolmethod = sol
      notstudy = std1
      notsol = current
      mesh = {geom1, mesh1}

Solver configurations
  sol1 "Lösung 1" (study std1)
    v1: Variables "Dependent Variables 1"
    s1: Stationary "Stationary Solver 1"
      dDef: Direct
      fc1: FullyCoupled | linsolver = dDef
  sol3 "Lösung 3" (study std2)
    v1: Variables "Abhängige Variablen 1"
    s1: Stationary "Stationärer Löser 1"
      dDef: Direct "Direkt"
      p1: Parametric "Parametrisch 1"
        sweeptype = filled
        pname = w
        plistarr = {0.1, 0.126384820293, 0.159731228006, 0.201876025468, 0.255140652003, 0.32245905453, 0.407539296587, 0.515067807617, 0.650967523046, 0.82272413417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}
      fc1: FullyCoupled "Vollständig gekoppelt 1" | linsolver = dDef

Datasets
  dset1: Solution | solution = sol1
  rev1: Revolve2D "Drehung 2D 1" | data = dset1; startangle = -90; revangle = 225
  dset3: Solution | solution = sol3
  rev3: Revolve2D "Drehung 2D 3" | data = dset3; startangle = -90; revangle = 225
  cln1: CutLine2D "Schnittlinie 2D 1" | data = dset3; genpoints = {{2.60293E-5, 1.201E-5}, {2.5E-5, 5.0E-5}}

Derived values
  int1: IntLine "sigma_eff" on boundaries 6
    data = dset3
    table = tbl1
    expr = -u23z*r*2*pi/(pi*L^2)/E0
    descr = Normalized effective conductivity
    method = integration

Tables
  tbl1: Table "Tabelle 1"
    // sigma_eff ((dflux.u21-dflux.u22)*2*pi/(pi*L^2)/E0/(2*mu*c0))
    w | Normalized effective conductivity
    0.1 | 0.999+4.99359e-09i
    0.126385 | 0.999+6.31112e-09i
    0.159731 | 0.999+7.97629e-09i
    0.201876 | 0.999+1.00808e-08i
    0.255141 | 0.999+1.27405e-08i
    0.322459 | 0.999+1.61019e-08i
    0.407539 | 0.999+2.03501e-08i
    0.515068 | 0.999+2.57188e-08i
    0.650968 | 0.999+3.25034e-08i
    0.822724 | 0.999+4.10768e-08i
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
Plots
  pg1: PlotGroup2D "2D Plot Group 1" | data = dset1
    surf1: Surface | expr = u
  pg2: PlotGroup3D "3D Plot Group 2" | data = rev1
    surf1: Surface | expr = u