// COMSOL Multiphysics 5.4.0.246 model "modelI.mph"
// Outline of the model tree
// Unit system: none

Parameters
  kB = 8.6173303e-5  // Boltzmann constant (eV/K)
  T = 293  // Absolute temperature (K)
  c0 = 1  // Bulk ion concentration (mol/m^3)
  F = 96485.3329  // Farady constant (As/mol)
  eps0 = 8.854187e-12  // Vacuum permittivity (F/m)
  e = 1.602e-19  // Unit charge (As)
  NA = F/e  // avogadros constant (1/mol)
  mu = 5e-8  // Ion mobility (m²/Vs)
  muS = mu/10  // Ion mobility in Stern layer (m²/Vs)
  L = 50e-6  // Radius of domain (m)
  R = 2e-6  // Radius of wide pore (m)
  a = 5e-6  // Particle radius (m)
  r0 = 0.2e-6  // Radius of narrow pore (m)
  w = 1  // Angular frequency (rad/s)
  E0 = 1  // External field strength (V/m)
  epsW = 80  // Relative permittivity of electrolyte (-)
  epsP = 4.5  // Relative permittivity of particle (-)
  lambda = sqrt(eps0*epsW*kB*T/(2*c0*F))  // Debye length (m)
  sig = 0.01  // Total surface charge density (C/m²)
  p = 1  // Fraction of charge in Stern layer (-)
  gNad = sig/e-gNaS  // Equivalent surface site density (1/m²)
  gNaS = sig/e*p  // Surface site density Stern layer (1/m²)
  tau = a*a/(2*mu*kB*T)  // Relaxation time (s)
  ka = 2*c0*mu*F

Variables
  var1 "Variablen"
    D = mu*kB*T  // Ion diffusivity (m²/s)
    DS = muS*kB*T  // Ion diffusivity in Stern layer (m²/s)
    kappa = 1/lambda  // Debye parameter (1/m)
    sigma0 = 2*c0*mu*F  // Bulk electr. conductivity (S/m)

Couplings
  genext2: GeneralExtrusion "Allgemeine Extrusion 2" on no boundaries
    dstmap = {a*sin(x), a*cos(x)}
    usesrcmap = on
    srcmap = {r, z}

Geometry
  geom1 "Geometrie 1" (2D axisymmetric, length unit m)
    r1: Rectangle "Rechteck 1" | pos = {0, -L}; size = {R, 2*L}
    pc1: ParametricCurve "Parametrische Kurve 1"
      pos = {r0+(R-r0)/2, -(a-(R-r0)/2)}
      parmin = pi
      parmax = 3/2*pi
      coord = {(R-r0)/2*cos(s), (R-r0)/2*sin(s)}
    pc2: ParametricCurve "Parametrische Kurve 2" | pos = {r0+(R-r0)/2, -a}; parmax = (R-r0)/2; coord = {s, 0}
    pc3: ParametricCurve "Parametrische Kurve 3"
      pos = {r0+(R-r0)/2, (a-(R-r0)/2)}
      parmin = pi/2
      parmax = pi
      coord = {(R-r0)/2*cos(s), (R-r0)/2*sin(s)}
    pc4: ParametricCurve "Parametrische Kurve 4" | pos = {r0+(R-r0)/2, a}; parmax = (R-r0)/2; coord = {s, 0}
    pol1: Polygon | x = {r0,r0}; y = {a-(R-r0)/2,-a+(R-r0)/2}
    par1: Partition "Partitioniere Objekte 1" | input = r1; tool = pc1, pc2, pc3, pc4, pol1
    fin: Finalize "Vereinigung bilden"

Physics
  c: CoefficientFormPDE "Stationary u0" on domains 1, 2
    dependent variable u
    cfeq1: CoefficientFormPDE "PB equation" (default)
      c = {eps0*if(dom==1,epsW,epsP)*r, 0, 0, eps0*if(dom==1,epsW,epsP)*r}
      f = -2*if(dom==1,c0,0)*F*sinh(u/(kB*T))*r
      da = 0
    zflx1: ZeroFluxBoundary "Kein Fluss 1" (default)
    init1: init "Anfangswerte 1" (default)
    flux1: FluxBoundary "Fixed charge BC surface" on boundaries 4, 8-11 | g = -gNad*e*r
    constr1: PointwiseConstraint "Punktweise Nebenbedingung 1" on points 1, 2
      constraintType = symmetricConstraint
      constraintExpression = u
  c2: CoefficientFormPDE "FD n,p,u" on all domains
    dependent variable u2 = {u21, u22, u23}
    cfeq1: CoefficientFormPDE "PNP System" (default)
      c = 
        {D*r*if(dom==1,1,0), 0, 0, D*r*if(dom==1,1,0)}
        {0, 0, 0, 0}
        {0, 0, 0, 0}
        {0, 0, 0, 0}
        {D*r*if(dom==1,1,0), 0, 0, D*r*if(dom==1,1,0)}
        {0, 0, 0, 0}
        {-mu*c0*exp(u/(kB*T))*r*if(dom==1,1,0), 0, 0, -mu*c0*exp(u/(kB*T))*r*if(dom==1,1,0)}
        {mu*c0*exp(-u/(kB*T))*r*if(dom==1,1,0), 0, 0, mu*c0*exp(-u/(kB*T))*r*if(dom==1,1,0)}
        {eps0*if(dom==1,epsW,epsP)*r, 0, 0, eps0*if(dom==1,epsW,epsP)*r}
      a = {i*w*r, 0, F*r*if(dom==1,1,0), 0, i*w*r, -F*r*if(dom==1,1,0), 0, 0, 0}
      f = {0, 0, 0}
      da = 0
      al = 
        {-mu*ur*r*if(dom==1,1,0), -mu*uz*r*if(dom==1,1,0)}
        {0, 0}
        {0, 0}
        {0, 0}
        {mu*ur*r*if(dom==1,1,0), mu*uz*r*if(dom==1,1,0)}
        {0, 0}
        {0, 0}
        {0, 0}
        {0, 0}
    zflx1: ZeroFluxBoundary "No flux" (default)
    init1: init "Initial values" (default)
    dir1: DirichletBoundary "BC top" on boundaries 3 | r = {0, 0, -E0*L}
    dir2: DirichletBoundary "BC bottom" on boundaries 2 | r = {0, 0, E0*L}
    flux1: FluxBoundary "Oscillating charge BC surface" on boundaries 4, 8-11 | g = {0, 0, u3*e*r}; q = 0
  cb: CoefficientFormBoundaryPDE "FD pS" on boundaries 4, 8-11
    dependent variable u3
    cfeq1: CoefficientFormPDE "PDGL, Koeffizientenform 1" (default)
      c = {DS*r, 0, 0, DS*r}
      a = i*w*r
      f = 0
      da = 0
      ga = {-muS*gNaS*u23r*r, -muS*gNaS*u23z*r}
    init1: init "Anfangswerte 1" (default)
    zflx1: ZeroFluxBoundary "Kein Fluss 1" on points 8, 9

Mesh
  mesh1 "Netz 1"
    size: MeshSizeDefault "Größe" | hmax = R/5; hmin = r0/5; hauto = 3
    size1: Size "Größe 1" on boundaries 4, 8-11 | hmax = r0/5; custom = on
    ftri1: FreeTri "Freies Dreiecksnetz 1" on remaining entities
    bl1: BndLayer "Randschichten 1" on entire geometry
      blp: BndLayerProp "Randschichteigenschaften" on boundaries 4, 8-11 | inittype = blhmin; blhmin = lambda/2

Studies
  std1 "1. Stationary PB"
    stat: Stationary "Stationär" | solve for = {c}
  std2 "2. FD PNP"
    param: Parametric "Parametrischer Sweep" | pname = w; plistarr = 10^{range(-2,6/59,4)}
    stat: Stationary "Stationär"
      solve for = {c2, cb}
      usesol = on
      notsolmethod = sol
      notstudy = std1
      notsol = current
      mesh = {geom1, mesh1}

Solver configurations
  sol1 "Lösung 1" (study std1)
    v1: Variables "Dependent Variables 1"
    s1: Stationary "Stationary Solver 1"
      dDef: Direct
      fc1: FullyCoupled | linsolver = dDef
  sol3 "Lösung 3" (study std2)
    v1: Variables "Abhängige Variablen 1"
    s1: Stationary "Stationärer Löser 1"
      dDef: Direct "Direkt"
      p1: Parametric "Parametrisch 1" | pname = w; plistarr = 10^{range(-2,6/59,4)}
      fc1: FullyCoupled "Vollständig gekoppelt 1" | linsolver = dDef

Datasets
  dset1: Solution | solution = sol1
  rev1: Revolve2D "Drehung 2D 1" | data = dset1; startangle = -90; revangle = 225
  dset3: Solution | solution = sol3
  rev3: Revolve2D "Drehung 2D 3" | data = dset3; startangle = -90; revangle = 225
  cln1: CutLine2D "Schnittlinie 2D 1" | data = dset3; genpoints = {{r0/2, -L}, {r0/2, L}}
  cpt1: CutPoint2D "Schnittpunkt 2D 1" | data = dset3; pointx = R; pointy = L; bndsnap = on
  edg1: Edge2D "Kante, 2D 1" on boundaries 7 | data = dset3

Derived values
  int1: IntLine "sigma_eff" on boundaries 3
    data = dset3
    table = tbl1
    expr = (dflux.u21-dflux.u22)*2*pi/(pi*R^2)/(2*c0*mu*E0)
    descr = Normalized effective conductivity
    method = integration

Tables
  tbl1: Table "Tabelle 1"
    // sigma_eff ((dflux.u21-dflux.u22)*2*pi/(pi*L^2)/E0/(2*mu*c0))
    w | Normalized effective conductivity
    0.01 | 0.0994602+3.22128e-06i
    0.0126385 | 0.0994602+4.07121e-06i
    0.0159731 | 0.0994602+5.14538e-06i
    0.0201876 | 0.0994602+6.50298e-06i
    0.0255141 | 0.0994602+8.21877e-06i
    0.0322459 | 0.0994602+1.03873e-05i
    0.0407539 | 0.0994602+1.31279e-05i
    0.0515068 | 0.0994602+1.65916e-05i
    0.0650968 | 0.0994603+2.09691e-05i
    0.0822724 | 0.0994603+2.65014e-05i
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  tbl2: Table "Tabelle 2"
    // Punktauswertung 1 (-muS*gNaS*e*u23*2*pi*R/(pi*R^2*ka*E0))
    w | -muS*gNaS*e*u23z*2*pi*r/(pi*R^2*ka*E0)*0+d(u3,to), Punkt: 8
    0.1 | 0
    0.359381 | 0
    1.29155 | 0
    4.64159 | 0
    16.681 | 0
    59.9484 | 0
    215.443 | 0
    774.264 | 0
    2782.56 | 0
    10000 | 0

Plots
  pg1: PlotGroup2D "2D Plot Group 1" | data = dset1
    surf1: Surface | expr = u
  pg2: PlotGroup3D "3D Plot Group 2" | data = rev1
    surf1: Surface | expr = u

Exports
  tbl1: Table "sigma_eff"
    table = tbl1
    filename = /users/buecker/modelling/shilov_comsol/paper4/modelI/modelI_spec06.txt